// COMSOL Multiphysics 6.2.0.290 model "test1.mph"
// Outline of the model tree

Parameters
  substrate_size = 40000.0[nm]

Geometry
  geom1 "Geometry 1" (3D, length unit µm)
    blk1: Block "substrate"
      pos = {0, 0, -822.5[nm]}
      base = center
      size = {substrate_size, substrate_size, 1645.0[nm]}
      layername = {Layer 1, Layer 2, Layer 3, Layer 4}
      layer = {1500.0[nm], 10.5[nm], 4.0[nm], 10.5[nm]}
    wp1: WorkPlane "mesa_etch_wp" | unite = on
      imp1: Import "mesa_etch"
        type = ecad
        filename = dot_3layers.GDS
        ecadtype = gds
        fileunit = µm
        layername = {LAYER5, LAYER7, LAYER61, LAYER101, LAYER111, LAYER122}
        layerprop = 
          {LAYER5, Metal}
          {LAYER7, Metal}
          {LAYER61, Metal}
          {LAYER101, Metal}
          {LAYER111, Metal}
          {LAYER122, Metal}
        importlayer = {on, off, off, off, off, off}
    ext1: Extrude "mesa_etch_Etch"
      workplane = wp1
      input = wp1
      inputhandling = remove
      distance = 134.5[nm]
      reverse = on
      scale = {1, 0.310256410256}
    dif1: Difference "mesa_etch" | input = blk1; input2 = ext1
    wp2: WorkPlane "dot_wp" | quickz = -134.5[nm]; unite = on
      imp2: Import
        type = ecad
        filename = dot_3layers.GDS
        ecadtype = gds
        fileunit = µm
        layername = {LAYER5, LAYER7, LAYER61, LAYER101, LAYER111, LAYER122}
        layerprop = 
          {LAYER5, Metal}
          {LAYER7, Metal}
          {LAYER61, Metal}
          {LAYER101, Metal}
          {LAYER111, Metal}
          {LAYER122, Metal}
        importlayer = {off, off, off, off, on, off}
    ext2: Extrude "dot_ext" | workplane = wp2; input = wp2; inputhandling = remove; distance = 4[nm]
    wp3: WorkPlane "metal_wp" | quickz = 800[nm]; unite = on
      imp3: Import
        type = ecad
        filename = dot_3layers.GDS
        ecadtype = gds
        fileunit = µm
        layername = {LAYER5, LAYER7, LAYER61, LAYER101, LAYER111, LAYER122}
        layerprop = 
          {LAYER5, Metal}
          {LAYER7, Metal}
          {LAYER61, Metal}
          {LAYER101, Metal}
          {LAYER111, Metal}
          {LAYER122, Metal}
        importlayer = {off, off, on, off, off, off}
    ext3: Extrude | workplane = wp3; input = wp3; inputhandling = remove; distance = 1000[nm]; reverse = on
    dif3: Difference | input = ext3; input2 = dif1; keepsubtract = on
    mov3: Move | input = dif3; displx = 0; disply = 0; displz = -50[nm]
    int3: Intersection | input = dif1, mov3; keep = on; intbnd = off; face = all
    mov300: Move | input = int3; displx = 0; disply = 0; displz = 50[nm]
    int300: Intersection | input = mov3, mov300
    wp4: WorkPlane "QPC_wp" | quickz = 35[nm]; unite = on
      imp4: Import
        type = ecad
        filename = dot_3layers.GDS
        ecadtype = gds
        fileunit = µm
        layername = {LAYER5, LAYER7, LAYER61, LAYER101, LAYER111, LAYER122}
        layerprop = 
          {LAYER5, Metal}
          {LAYER7, Metal}
          {LAYER61, Metal}
          {LAYER101, Metal}
          {LAYER111, Metal}
          {LAYER122, Metal}
        importlayer = {off, on, off, off, off, off}
    wp5: WorkPlane "Plunger_wp" | quickz = -99.5[nm]; unite = on
      imp5: Import
        type = ecad
        filename = dot_3layers.GDS
        ecadtype = gds
        fileunit = µm
        layername = {LAYER5, LAYER7, LAYER61, LAYER101, LAYER111, LAYER122}
        layerprop = 
          {LAYER5, Metal}
          {LAYER7, Metal}
          {LAYER61, Metal}
          {LAYER101, Metal}
          {LAYER111, Metal}
          {LAYER122, Metal}
        importlayer = {off, off, off, on, off, off}
    sel6: ExplicitSelection "DomainTerminalsel" | selection = ext2; selshow = all
    sel7: ExplicitSelection "Groundsel" | selection = wp4, wp5; selshow = all
    fin: Finalize "Form Union"

Materials
  InAs: Common on domains 3, 6, 9, 11-13
    def "Basic"
      relpermittivity = 15.1
  InGaAs: Common on domains 2, 4, 7
    def "Basic"
      relpermittivity = 14.1
  InAlAs: Common on domains 1, 5, 8
    def "Basic"
      relpermittivity = 13.3
  Al2O3: Common on no domains
    def "Basic"
      relpermittivity = 4.5

Physics
  es: Electrostatics on all domains
    dependent variable V
    ccn1: ChargeConservation (default)
    zc1: ZeroCharge (default)
    init1: init "Initial Values 1" (default)
    DomainTerminal6: DomainTerminal "Terminal 6" on selection geom1_sel6_dom
    gnd7: Ground on selection geom1_sel7_bnd

Mesh
  mesh1 "Mesh 1" (physics-controlled)

Studies
  std1 "Study 1"
    stssw: StationarySourceSweep | plist = 1